*HEADING
Template maxilla MVP - medium_kpa_plus_muscle_4n
*NODE
1, 0.00000000, 0.00000000, 0.00000000
2, 0.00571429, 0.00032143, 0.00000000
3, 0.01142857, 0.00064286, 0.00000000
4, 0.01714286, 0.00096429, 0.00000000
5, 0.02285714, 0.00128571, 0.00000000
6, 0.02857143, 0.00160714, 0.00000000
7, 0.03428571, 0.00192857, 0.00000000
8, 0.04000000, 0.00225000, 0.00000000
9, 0.04571429, 0.00257143, 0.00000000
10, 0.05142857, 0.00289286, 0.00000000
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*ELEMENT, TYPE=C3D8, ELSET=EALL
1, 1, 2, 17, 16, 166, 167, 182, 181
2, 2, 3, 18, 17, 167, 168, 183, 182
3, 3, 4, 19, 18, 168, 169, 184, 183
4, 4, 5, 20, 19, 169, 170, 185, 184
5, 5, 6, 21, 20, 170, 171, 186, 185
6, 6, 7, 22, 21, 171, 172, 187, 186
7, 7, 8, 23, 22, 172, 173, 188, 187
8, 8, 9, 24, 23, 173, 174, 189, 188
9, 9, 10, 25, 24, 174, 175, 190, 189
10, 10, 11, 26, 25, 175, 176, 191, 190
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*NSET, NSET=NALL
1, 2, 3, 4, 5, 6, 7, 8, 9, 10, 11, 12, 13, 14, 15, 16
17, 18, 19, 20, 21, 22, 23, 24, 25, 26, 27, 28, 29, 30, 31, 32
33, 34, 35, 36, 37, 38, 39, 40, 41, 42, 43, 44, 45, 46, 47, 48
49, 50, 51, 52, 53, 54, 55, 56, 57, 58, 59, 60, 61, 62, 63, 64
65, 66, 67, 68, 69, 70, 71, 72, 73, 74, 75, 76, 77, 78, 79, 80
81, 82, 83, 84, 85, 86, 87, 88, 89, 90, 91, 92, 93, 94, 95, 96
97, 98, 99, 100, 101, 102, 103, 104, 105, 106, 107, 108, 109, 110, 111, 112
113, 114, 115, 116, 117, 118, 119, 120, 121, 122, 123, 124, 125, 126, 127, 128
129, 130, 131, 132, 133, 134, 135, 136, 137, 138, 139, 140, 141, 142, 143, 144
145, 146, 147, 148, 149, 150, 151, 152, 153, 154, 155, 156, 157, 158, 159, 160
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*NSET, NSET=NSET_FIXED
1, 16, 31, 46, 61, 76, 91, 106, 121, 136, 151, 166, 181, 196, 211, 226
241, 256, 271, 286, 301, 316, 331, 346, 361, 376, 391, 406, 421, 436, 451, 466
481, 496, 511, 526, 541, 556, 571, 586, 601, 616, 631, 646, 661, 676, 691, 706
721, 736, 751, 766, 781, 796, 811, 826, 841, 856, 871, 886, 901, 916, 931, 946
961, 976
*NSET, NSET=NSET_PALATE
826, 827, 828, 829, 830, 831, 832, 833, 834, 835, 836, 837, 838, 839, 840, 841
842, 843, 844, 845, 846, 847, 848, 849, 850, 851, 852, 853, 854, 855, 856, 857
858, 859, 860, 861, 862, 863, 864, 865, 866, 867, 868, 869, 870, 871, 872, 873
874, 875, 876, 877, 878, 879, 880, 881, 882, 883, 884, 885, 886, 887, 888, 889
890, 891, 892, 893, 894, 895, 896, 897, 898, 899, 900, 901, 902, 903, 904, 905
906, 907, 908, 909, 910, 911, 912, 913, 914, 915, 916, 917, 918, 919, 920, 921
922, 923, 924, 925, 926, 927, 928, 929, 930, 931, 932, 933, 934, 935, 936, 937
938, 939, 940, 941, 942, 943, 944, 945, 946, 947, 948, 949, 950, 951, 952, 953
954, 955, 956, 957, 958, 959, 960, 961, 962, 963, 964, 965, 966, 967, 968, 969
970, 971, 972, 973, 974, 975, 976, 977, 978, 979, 980, 981, 982, 983, 984, 985
986, 987, 988, 989, 990
*NSET, NSET=NSET_MUSCLE_ALL
835, 836, 837, 838, 839, 840, 850, 851, 852, 853, 854, 855, 865, 866, 867, 868
869, 870, 955, 956, 957, 958, 959, 960, 970, 971, 972, 973, 974, 975, 985, 986
987, 988, 989, 990
*MATERIAL, NAME=BONE
*ELASTIC
1.000000e+09, 0.300000
*SOLID SECTION, ELSET=EALL, MATERIAL=BONE
,
*STEP
*STATIC
1., 1.
*BOUNDARY
NSET_FIXED, 1, 3, 0.0
*CLOAD
826, 3, -4.848485e-02
827, 3, -4.848485e-02
828, 3, -4.848485e-02
829, 3, -4.848485e-02
830, 3, -4.848485e-02
831, 3, -4.848485e-02
832, 3, -4.848485e-02
833, 3, -4.848485e-02
834, 3, -4.848485e-02
835, 3, -4.848485e-02
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*NODE FILE
U
*EL FILE
S
*NODE PRINT, NSET=NALL
U
*EL PRINT, ELSET=EALL
S
*END STEP
